<?xml version="1.0"?>


<!--


  ****************** IMPORTANT NOTICES **********************

   This is an alpha version release of the DATCOM+ program for
   JSBSIM. Nothing, and I do mean NOTHING, as been checked to
   verify that the parameters, units, sign conventions, or
   basically anything else is correct. Your mileage may vary.

   ***********************************************************

   This file was generated by Datcom+, a superset of
    the USAF Digital DATCOM program.
   This file is considered an intermediary file in the
   DATCOM/JSBSim process. This file may be overwritten without
   warning, so any changes that you make in here may be lost.

   If you intend to use this file as it is and modify it, make
   sure that you take the necessary precautions to prevent it
   from being overwritten, like renaming it.


   ***********************************************************


   DISCLAIMER REQUIRED BY HQ USAF FOR PUBLIC RELEASE APPROVAL

   THIS SOFTWARE AND ANY ACCOMPANYING DOCUMENTATION
   IS RELEASED "AS IS".  THE U.S. GOVERNMENT MAKES NO
   WARRANTY OF ANY KIND, EXPRESS OR IMPLIED, CONCERNING
   THIS SOFTWARE AND ANY ACCOMPANYING DOCUMENTATION,
   INCLUDING, WITHOUT LIMITATION, ANY WARRANTIES OF
   MERCHANTABILITY OR FITNESS FOR A PARTICULAR PURPOSE.
   IN NO EVENT WILL THE U.S. GOVERNMENT BE LIABLE FOR ANY
   DAMAGES, INCLUDING LOST PROFITS, LOST SAVINGS OR OTHER
   INCIDENTAL OR CONSEQUENTIAL DAMAGES ARISING OUT OF THE
   USE, OR INABILITY TO USE, THIS SOFTWARE OR ANY
   ACCOMPANYING DOCUMENTATION, EVEN IF INFORMED IN ADVANCE
   OF THE POSSIBILITY OF SUCH DAMAGES.


   ***********************************************************
-->


<!-- **********************************************************************
        AERODYNAMICS
     **********************************************************************
-->


   <aerodynamics>

      <alphalimits unit="DEG">
         <min>  -16.00    </min>
         <max>   22.00    </max>
      </alphalimits>


      <!-- *************************
                Sign Conventions
           *************************

           Control displacements
                Stick    FWD  + / Aft -
                Stick    Left + / Right -
                Wheel    CCW  + / CW -
                Pedal    Left + / Right -
                Elevator trim Nose Up + / Nose down -

           Surfaces
                Elevator  TED + / TEU -
                R Ail     TED + / TEU -
                L Ail     TED + / TEU -
                Rudder    TEL + / TER -

           F&M, Accel, Rates, Displacements
                Pitch     Up  + / Down -
                Roll      Rgt + / Left -
                Yaw       Rgt + / Left -

           Other
                Alpha     Up  + / Down -
                Beta Wind in right ear + / Wind in left ear -
                Slip Ball right of center + / left of center -
      -->


      <!-- **************************************
                ASSUMPTIONS AND LIMITATIONS

           There is no interaction between deflected surfaces modeled
           so there is no change in elevator effects with the flaps
           deflected, for example.

           Terms known to be missing from DATCOM:
              Power effects
              Ground effects
              Cyr, CyDr, Cyda, ClDr, Cndr

           **************************************
      -->


      <!--
           The following ground effect tables are NOT generated
           by DATCOM, but provide representative effects.
           These terms are not currently used in this model.
      -->


      <function name="aero/function/ground-effect-factor-lift">
         <description>Change in lift due to ground effect factor</description>
         <product>
            <table>
               <independentVar lookup="row">aero/h_b-mac-ft</independentVar>
               <tableData>
                  0.0  1.203
                  0.1  1.127
                  0.15 1.090
                  0.2  1.073
                  0.3  1.046
                  0.4  1.055
                  0.5  1.019
                  0.6  1.013
                  0.7  1.008
                  0.8  1.006
                  0.9  1.003
                  1.0  1.002
                  1.1  1.0
               </tableData>
            </table>
         </product>
      </function>

      <function name="aero/function/ground-effect-factor-drag">
         <description>Change in drag due to ground effect</description>
         <product>
            <table>
               <independentVar lookup="row">aero/h_b-mac-ft</independentVar>
               <tableData>
                  0.0  0.480
                  0.1  0.515
                  0.15 0.629
                  0.2  0.709
                  0.3  0.815
                  0.4  0.882
                  0.5  0.928
                  0.6  0.962
                  0.7  0.988
                  0.8  1.0
                  0.9  1.0
                  1.0  1.0
                  1.1  1.0
               </tableData>
            </table>
         </product>
      </function>


<!-- ********************************************************************** -->


     <axis name="LIFT">


         <function name="aero/coefficient/CLwbh">
            <description>
               Lift due to alpha
               Increase in CL decreases Period and damping,Dutch Roll damping
               CL is low for landing
            </description>
            <product>
               <property>aero/function/ground-effect-factor-lift</property>
               <property>aero/qbar-psf</property>
               <property>metrics/Sw-sqft</property>
               <table>
                  <independentVar lookup="row">aero/alpha-deg</independentVar>
                  <tableData>
                       -16.00        -.4129
                       -8.000        -.2457
                       -6.000        -.1848
                       -4.000        -.1232
                       -2.000        -.6139E-01
                         .000         .1241E-30
                        2.000         .6139E-01
                        4.000         .1256
                        6.000         .2009
                        8.000         .2876
                        9.000         .3348
                        10.00         .3836
                        12.00         .4796
                        14.00         .5750
                        16.00         .6678
                        18.00         .7551
                        19.00         .8020
                        20.00         .8580
                        21.00         .9063
                        22.00         .9451
                  </tableData>
               </table>
            </product>
         </function>

         <function name="aero/coefficient/CLq">
            <description>
               Basic Lift Coefficient due to pitch rate(per degree)
            </description>
            <product>
               <property>velocities/q-aero-rad_sec</property>
               <value>57.29577951</value>
               <property>aero/qbar-psf</property>
               <property>metrics/Sw-sqft</property>
               <property>aero/ci2vel</property>
               <table>
                  <independentVar lookup="row">aero/alpha-deg</independentVar>
                  <tableData>
                       -16.00         .2070
                       -8.000         .2070
                       -6.000         .2070
                       -4.000         .2070
                       -2.000         .2070
                         .000         .2070
                        2.000         .2070
                        4.000         .2070
                        6.000         .2070
                        8.000         .2070
                        9.000         .2070
                        10.00         .2070
                        12.00         .2070
                        14.00         .2070
                        16.00         .2070
                        18.00         .2070
                        19.00         .2070
                        20.00         .2070
                        21.00         .2070
                        22.00         .2070
                  </tableData>
               </table>
            </product>
         </function>

         <function name="aero/coefficient/CLad">
            <description>
               Basic Lift Coefficient due to AOA rate(per degree)
               Important contributor to Short-Period damping
               For low Cla, aircraft must land at high alpha
            </description>
            <product>
               <property>aero/alphadot-deg_sec</property>
               <property>aero/qbar-psf</property>
               <property>metrics/Sw-sqft</property>
               <property>aero/ci2vel</property>
               <table>
                  <independentVar lookup="row">aero/alpha-deg</independentVar>
                  <tableData>
                       -16.00          .000
                       -8.000          .000
                       -6.000          .000
                       -4.000          .000
                       -2.000          .000
                         .000          .000
                        2.000          .000
                        4.000          .000
                        6.000          .000
                        8.000          .000
                        9.000          .000
                        10.00          .000
                        12.00          .000
                        14.00          .000
                        16.00          .000
                        18.00          .000
                        19.00          .000
                        20.00          .000
                        21.00          .000
                        22.00          .000
                  </tableData>
               </table>
            </product>
         </function>

         <function name="aero/coefficient/CLdF1L">
            <description>
               Lift Coefficient due to Left Plain Flaps Deflection
               Positive surface deflection is trailing edge down
               Ultimately, we will feed this left flap pos
            </description>
            <product>
               <property>aero/qbar-psf</property>
               <property>metrics/Sw-sqft</property>
               <table>
                  <independentVar lookup="row">fcs/flap-pos-deg</independentVar>
                  <tableData>
                       -20.00        -.8865E-01
                       -15.00        -.7509E-01
                       -10.00        -.5118E-01
                       -5.000        -.2559E-01
                         .000          .000
                        5.000         .2559E-01
                        10.00         .5118E-01
                        13.00         .6597E-01
                        16.00         .7921E-01
                  </tableData>
               </table>
            </product>
         </function>

         <function name="aero/coefficient/CLdF1R">
            <description>
               Lift Coefficient due to Right Plain Flaps Deflection
               Positive surface deflection is trailing edge down
               Ultimately, we will feed this right flap pos
            </description>
            <product>
               <property>aero/qbar-psf</property>
               <property>metrics/Sw-sqft</property>
               <table>
                  <independentVar lookup="row">fcs/flap-pos-deg</independentVar>
                  <tableData>
                       -20.00        -.8865E-01
                       -15.00        -.7509E-01
                       -10.00        -.5118E-01
                       -5.000        -.2559E-01
                         .000          .000
                        5.000         .2559E-01
                        10.00         .5118E-01
                        13.00         .6597E-01
                        16.00         .7921E-01
                  </tableData>
               </table>
            </product>
         </function>

         <function name="aero/coefficient/CLdF11L">
            <description>
               Lift Coefficient due to Left Plain Flaps Deflection
               Positive surface deflection is trailing edge down
               Ultimately, we will feed this left flap pos
            </description>
            <product>
               <property>aero/qbar-psf</property>
               <property>metrics/Sw-sqft</property>
               <table>
                  <independentVar lookup="row">fcs/flap-pos-deg</independentVar>
                  <tableData>
                        20.00        -.8926E-01
                        15.00        -.7560E-01
                        10.00        -.5153E-01
                        5.000        -.2576E-01
                         .000          .000
                       -5.000         .2576E-01
                       -10.00         .5153E-01
                       -13.00         .6642E-01
                       -16.00         .7975E-01
                  </tableData>
               </table>
            </product>
         </function>

         <function name="aero/coefficient/CLdF11R">
            <description>
               Lift Coefficient due to Right Plain Flaps Deflection
               Positive surface deflection is trailing edge down
               Ultimately, we will feed this right flap pos
            </description>
            <product>
               <property>aero/qbar-psf</property>
               <property>metrics/Sw-sqft</property>
               <table>
                  <independentVar lookup="row">fcs/flap-pos-deg</independentVar>
                  <tableData>
                        20.00        -.8926E-01
                        15.00        -.7560E-01
                        10.00        -.5153E-01
                        5.000        -.2576E-01
                         .000          .000
                       -5.000         .2576E-01
                       -10.00         .5153E-01
                       -13.00         .6642E-01
                       -16.00         .7975E-01
                  </tableData>
               </table>
            </product>
         </function>

         <function name="aero/coefficient/CLdF12L">
            <description>
               Lift Coefficient due to Left Plain Flaps Deflection
               Positive surface deflection is trailing edge down
               Ultimately, we will feed this left flap pos
            </description>
            <product>
               <property>aero/qbar-psf</property>
               <property>metrics/Sw-sqft</property>
               <table>
                  <independentVar lookup="row">fcs/flap-pos-deg</independentVar>
                  <tableData>
                        20.00        -.8897E-01
                        15.00        -.7536E-01
                        10.00        -.5136E-01
                        5.000        -.2568E-01
                         .000          .000
                       -5.000         .2568E-01
                       -10.00         .5136E-01
                       -13.00         .6620E-01
                       -16.00         .7949E-01
                  </tableData>
               </table>
            </product>
         </function>

         <function name="aero/coefficient/CLdF12R">
            <description>
               Lift Coefficient due to Right Plain Flaps Deflection
               Positive surface deflection is trailing edge down
               Ultimately, we will feed this right flap pos
            </description>
            <product>
               <property>aero/qbar-psf</property>
               <property>metrics/Sw-sqft</property>
               <table>
                  <independentVar lookup="row">fcs/flap-pos-deg</independentVar>
                  <tableData>
                        20.00        -.8897E-01
                        15.00        -.7536E-01
                        10.00        -.5136E-01
                        5.000        -.2568E-01
                         .000          .000
                       -5.000         .2568E-01
                       -10.00         .5136E-01
                       -13.00         .6620E-01
                       -16.00         .7949E-01
                  </tableData>
               </table>
            </product>
         </function>

         <function name="aero/coefficient/CLdeL">
            <description>
               Lift Coefficient due to Left Stabilator Deflection
               Positive surface deflection is trailing edge down
            </description>
            <product>
               <property>aero/qbar-psf</property>
               <property>metrics/Sw-sqft</property>
               <table>
                  <independentVar lookup="row">fcs/left-stabilator-pos-deg</independentVar>
                  <tableData>
                       -20.00        -.8897E-01
                       -15.00        -.7536E-01
                       -10.00        -.5136E-01
                       -5.000        -.2568E-01
                         .000         .5136E-04
                        5.000         .2568E-01
                        10.00         .5136E-01
                        13.00         .6620E-01
                        16.00         .7949E-01
                  </tableData>
               </table>
            </product>
         </function>

         <function name="aero/coefficient/CLdeR">
            <description>
               Lift Coefficient due to Right Stabilator Deflection
               Positive surface deflection is trailing edge down
            </description>
            <product>
               <property>aero/qbar-psf</property>
               <property>metrics/Sw-sqft</property>
               <table>
                  <independentVar lookup="row">fcs/right-stabilator-pos-deg</independentVar>
                  <tableData>
                       -20.00        -.8897E-01
                       -15.00        -.7536E-01
                       -10.00        -.5136E-01
                       -5.000        -.2568E-01
                         .000         .5136E-04
                        5.000         .2568E-01
                        10.00         .5136E-01
                        13.00         .6620E-01
                        16.00         .7949E-01
                  </tableData>
               </table>
            </product>
         </function>

     </axis>


<!-- ********************************************************************** -->


     <axis name="DRAG">


         <function name="aero/coefficient/CD">
            <description>
               Basic Drag Coefficient
               Sense: Always positive
               Main contributor to Phugoid damping: Greater Cd, Better damping
            </description>
            <product>
               <property>aero/function/ground-effect-factor-lift</property>
               <property>aero/qbar-psf</property>
               <property>metrics/Sw-sqft</property>
               <table>
                  <independentVar lookup="row">aero/alpha-deg</independentVar>
                  <tableData>
                       -16.00         .9372E-01
                       -8.000         .4755E-01
                       -6.000         .3735E-01
                       -4.000         .2999E-01
                       -2.000         .2558E-01
                         .000         .2412E-01
                        2.000         .2558E-01
                        4.000         .3016E-01
                        6.000         .3905E-01
                        8.000         .5344E-01
                        9.000         .6303E-01
                        10.00         .7419E-01
                        12.00         .1000
                        14.00         .1309
                        16.00         .1668
                        18.00         .2075
                        19.00         .2315
                        20.00         .2602
                        21.00         .2886
                        22.00         .3164
                  </tableData>
               </table>
            </product>
         </function>

         <function name="aero/coefficient/CdDf1L">
            <description>
               Drag Coefficient due to Left Plain Flaps Deflection
               Positive surface deflection is trailing edge down
               Ultimately, we will feed this left flap pos
            </description>
            <product>
               <property>aero/qbar-psf</property>
               <property>metrics/Sw-sqft</property>
               <table>
                  <independentVar lookup="row">aero/alpha-deg</independentVar>
                  <independentVar lookup="column">fcs/flap-pos-deg</independentVar>
                  <tableData>
                                     -20.00        -15.00        -10.00        -5.000          .000         5.000         10.00         13.00         16.00
                       -16.00         .1700E-01     .1401E-01     .9108E-02     .4317E-02      .000        -.3843E-02    -.7212E-02    -.8943E-02    -.1036E-01
                       -8.000         .9928E-02     .8028E-02     .5028E-02     .2277E-02      .000        -.1803E-02    -.3132E-02    -.3684E-02    -.4044E-02
                       -6.000         .8159E-02     .6531E-02     .4008E-02     .1767E-02      .000        -.1293E-02    -.2112E-02    -.2369E-02    -.2465E-02
                       -4.000         .6390E-02     .5035E-02     .2988E-02     .1257E-02      .000        -.7830E-03    -.1092E-02    -.1055E-02    -.8864E-03
                       -2.000         .4621E-02     .3538E-02     .1968E-02     .7470E-03      .000        -.2730E-03    -.7207E-04     .2602E-03     .6925E-03
                         .000         .2851E-02     .2041E-02     .9480E-03     .2370E-03      .000         .2370E-03     .9480E-03     .1575E-02     .2271E-02
                        2.000         .1082E-02     .5443E-03    -.7207E-04    -.2730E-03      .000         .7470E-03     .1968E-02     .2890E-02     .3850E-02
                        4.000        -.6867E-03    -.9524E-03    -.1092E-02    -.7830E-03      .000         .1257E-02     .2988E-02     .4204E-02     .5429E-02
                        6.000        -.2456E-02    -.2449E-02    -.2112E-02    -.1293E-02      .000         .1767E-02     .4008E-02     .5519E-02     .7008E-02
                        8.000        -.4225E-02    -.3946E-02    -.3132E-02    -.1803E-02      .000         .2277E-02     .5028E-02     .6834E-02     .8587E-02
                        9.000        -.5109E-02    -.4694E-02    -.3642E-02    -.2058E-02      .000         .2532E-02     .5538E-02     .7491E-02     .9377E-02
                        10.00        -.5994E-02    -.5443E-02    -.4152E-02    -.2313E-02      .000         .2787E-02     .6048E-02     .8149E-02     .1017E-01
                        12.00        -.7763E-02    -.6939E-02    -.5172E-02    -.2823E-02      .000         .3297E-02     .7068E-02     .9463E-02     .1175E-01
                        14.00        -.9532E-02    -.8436E-02    -.6192E-02    -.3333E-02      .000         .3807E-02     .8088E-02     .1078E-01     .1332E-01
                        16.00        -.1130E-01    -.9933E-02    -.7212E-02    -.3843E-02      .000         .4317E-02     .9108E-02     .1209E-01     .1490E-01
                        18.00        -.1307E-01    -.1143E-01    -.8232E-02    -.4353E-02      .000         .4827E-02     .1013E-01     .1341E-01     .1648E-01
                        19.00        -.1395E-01    -.1218E-01    -.8742E-02    -.4608E-02      .000         .5082E-02     .1064E-01     .1407E-01     .1727E-01
                        20.00        -.1484E-01    -.1293E-01    -.9252E-02    -.4863E-02      .000         .5337E-02     .1115E-01     .1472E-01     .1806E-01
                        21.00        -.1572E-01    -.1367E-01    -.9762E-02    -.5118E-02      .000         .5592E-02     .1166E-01     .1538E-01     .1885E-01
                        22.00        -.1661E-01    -.1442E-01    -.1027E-01    -.5373E-02      .000         .5847E-02     .1217E-01     .1604E-01     .1964E-01
                  </tableData>
               </table>
            </product>
         </function>

         <function name="aero/coefficient/CdDf1R">
            <description>
               Drag Coefficient due to Right Plain Flaps Deflection
               Positive surface deflection is trailing edge down
               Ultimately, we will feed this right flap pos
            </description>
            <product>
               <property>aero/qbar-psf</property>
               <property>metrics/Sw-sqft</property>
               <table>
                  <independentVar lookup="row">aero/alpha-deg</independentVar>
                  <independentVar lookup="column">fcs/flap-pos-deg</independentVar>
                  <tableData>
                                     -20.00        -15.00        -10.00        -5.000          .000         5.000         10.00         13.00         16.00
                       -16.00         .1700E-01     .1401E-01     .9108E-02     .4317E-02      .000        -.3843E-02    -.7212E-02    -.8943E-02    -.1036E-01
                       -8.000         .9928E-02     .8028E-02     .5028E-02     .2277E-02      .000        -.1803E-02    -.3132E-02    -.3684E-02    -.4044E-02
                       -6.000         .8159E-02     .6531E-02     .4008E-02     .1767E-02      .000        -.1293E-02    -.2112E-02    -.2369E-02    -.2465E-02
                       -4.000         .6390E-02     .5035E-02     .2988E-02     .1257E-02      .000        -.7830E-03    -.1092E-02    -.1055E-02    -.8864E-03
                       -2.000         .4621E-02     .3538E-02     .1968E-02     .7470E-03      .000        -.2730E-03    -.7207E-04     .2602E-03     .6925E-03
                         .000         .2851E-02     .2041E-02     .9480E-03     .2370E-03      .000         .2370E-03     .9480E-03     .1575E-02     .2271E-02
                        2.000         .1082E-02     .5443E-03    -.7207E-04    -.2730E-03      .000         .7470E-03     .1968E-02     .2890E-02     .3850E-02
                        4.000        -.6867E-03    -.9524E-03    -.1092E-02    -.7830E-03      .000         .1257E-02     .2988E-02     .4204E-02     .5429E-02
                        6.000        -.2456E-02    -.2449E-02    -.2112E-02    -.1293E-02      .000         .1767E-02     .4008E-02     .5519E-02     .7008E-02
                        8.000        -.4225E-02    -.3946E-02    -.3132E-02    -.1803E-02      .000         .2277E-02     .5028E-02     .6834E-02     .8587E-02
                        9.000        -.5109E-02    -.4694E-02    -.3642E-02    -.2058E-02      .000         .2532E-02     .5538E-02     .7491E-02     .9377E-02
                        10.00        -.5994E-02    -.5443E-02    -.4152E-02    -.2313E-02      .000         .2787E-02     .6048E-02     .8149E-02     .1017E-01
                        12.00        -.7763E-02    -.6939E-02    -.5172E-02    -.2823E-02      .000         .3297E-02     .7068E-02     .9463E-02     .1175E-01
                        14.00        -.9532E-02    -.8436E-02    -.6192E-02    -.3333E-02      .000         .3807E-02     .8088E-02     .1078E-01     .1332E-01
                        16.00        -.1130E-01    -.9933E-02    -.7212E-02    -.3843E-02      .000         .4317E-02     .9108E-02     .1209E-01     .1490E-01
                        18.00        -.1307E-01    -.1143E-01    -.8232E-02    -.4353E-02      .000         .4827E-02     .1013E-01     .1341E-01     .1648E-01
                        19.00        -.1395E-01    -.1218E-01    -.8742E-02    -.4608E-02      .000         .5082E-02     .1064E-01     .1407E-01     .1727E-01
                        20.00        -.1484E-01    -.1293E-01    -.9252E-02    -.4863E-02      .000         .5337E-02     .1115E-01     .1472E-01     .1806E-01
                        21.00        -.1572E-01    -.1367E-01    -.9762E-02    -.5118E-02      .000         .5592E-02     .1166E-01     .1538E-01     .1885E-01
                        22.00        -.1661E-01    -.1442E-01    -.1027E-01    -.5373E-02      .000         .5847E-02     .1217E-01     .1604E-01     .1964E-01
                  </tableData>
               </table>
            </product>
         </function>

         <function name="aero/coefficient/CdDf11L">
            <description>
               Drag Coefficient due to Left Plain Flaps Deflection
               Positive surface deflection is trailing edge down
               Ultimately, we will feed this left flap pos
            </description>
            <product>
               <property>aero/qbar-psf</property>
               <property>metrics/Sw-sqft</property>
               <table>
                  <independentVar lookup="row">aero/alpha-deg</independentVar>
                  <independentVar lookup="column">fcs/flap-pos-deg</independentVar>
                  <tableData>
                                      20.00         15.00         10.00         5.000          .000        -5.000        -10.00        -13.00        -16.00
                       -16.00         .1724E-01     .1421E-01     .9233E-02     .4376E-02      .000        -.3895E-02    -.7310E-02    -.9064E-02    -.1050E-01
                       -8.000         .1007E-01     .8139E-02     .5097E-02     .2308E-02      .000        -.1827E-02    -.3174E-02    -.3733E-02    -.4097E-02
                       -6.000         .8273E-02     .6622E-02     .4063E-02     .1791E-02      .000        -.1310E-02    -.2140E-02    -.2400E-02    -.2497E-02
                       -4.000         .6479E-02     .5105E-02     .3030E-02     .1274E-02      .000        -.7935E-03    -.1106E-02    -.1068E-02    -.8965E-03
                       -2.000         .4686E-02     .3588E-02     .1996E-02     .7574E-03      .000        -.2765E-03    -.7219E-04     .2651E-03     .7040E-03
                         .000         .2893E-02     .2071E-02     .9617E-03     .2404E-03      .000         .2404E-03     .9617E-03     .1598E-02     .2304E-02
                        2.000         .1100E-02     .5536E-03    -.7219E-04    -.2765E-03      .000         .7574E-03     .1996E-02     .2930E-02     .3905E-02
                        4.000        -.6935E-03    -.9635E-03    -.1106E-02    -.7935E-03      .000         .1274E-02     .3030E-02     .4263E-02     .5505E-02
                        6.000        -.2487E-02    -.2481E-02    -.2140E-02    -.1310E-02      .000         .1791E-02     .4063E-02     .5596E-02     .7106E-02
                        8.000        -.4280E-02    -.3998E-02    -.3174E-02    -.1827E-02      .000         .2308E-02     .5097E-02     .6928E-02     .8706E-02
                        9.000        -.5176E-02    -.4756E-02    -.3691E-02    -.2086E-02      .000         .2567E-02     .5614E-02     .7595E-02     .9507E-02
                        10.00        -.6073E-02    -.5515E-02    -.4208E-02    -.2344E-02      .000         .2825E-02     .6131E-02     .8261E-02     .1031E-01
                        12.00        -.7866E-02    -.7032E-02    -.5242E-02    -.2861E-02      .000         .3342E-02     .7165E-02     .9594E-02     .1191E-01
                        14.00        -.9659E-02    -.8549E-02    -.6276E-02    -.3378E-02      .000         .3859E-02     .8199E-02     .1093E-01     .1351E-01
                        16.00        -.1145E-01    -.1007E-01    -.7310E-02    -.3895E-02      .000         .4376E-02     .9233E-02     .1226E-01     .1511E-01
                        18.00        -.1325E-01    -.1158E-01    -.8344E-02    -.4412E-02      .000         .4893E-02     .1027E-01     .1359E-01     .1671E-01
                        19.00        -.1414E-01    -.1234E-01    -.8861E-02    -.4671E-02      .000         .5152E-02     .1078E-01     .1426E-01     .1751E-01
                        20.00        -.1504E-01    -.1310E-01    -.9377E-02    -.4929E-02      .000         .5410E-02     .1130E-01     .1492E-01     .1831E-01
                        21.00        -.1594E-01    -.1386E-01    -.9894E-02    -.5188E-02      .000         .5669E-02     .1182E-01     .1559E-01     .1911E-01
                        22.00        -.1683E-01    -.1462E-01    -.1041E-01    -.5446E-02      .000         .5927E-02     .1233E-01     .1626E-01     .1991E-01
                  </tableData>
               </table>
            </product>
         </function>

         <function name="aero/coefficient/CdDf11R">
            <description>
               Drag Coefficient due to Right Plain Flaps Deflection
               Positive surface deflection is trailing edge down
               Ultimately, we will feed this right flap pos
            </description>
            <product>
               <property>aero/qbar-psf</property>
               <property>metrics/Sw-sqft</property>
               <table>
                  <independentVar lookup="row">aero/alpha-deg</independentVar>
                  <independentVar lookup="column">fcs/flap-pos-deg</independentVar>
                  <tableData>
                                      20.00         15.00         10.00         5.000          .000        -5.000        -10.00        -13.00        -16.00
                       -16.00         .1724E-01     .1421E-01     .9233E-02     .4376E-02      .000        -.3895E-02    -.7310E-02    -.9064E-02    -.1050E-01
                       -8.000         .1007E-01     .8139E-02     .5097E-02     .2308E-02      .000        -.1827E-02    -.3174E-02    -.3733E-02    -.4097E-02
                       -6.000         .8273E-02     .6622E-02     .4063E-02     .1791E-02      .000        -.1310E-02    -.2140E-02    -.2400E-02    -.2497E-02
                       -4.000         .6479E-02     .5105E-02     .3030E-02     .1274E-02      .000        -.7935E-03    -.1106E-02    -.1068E-02    -.8965E-03
                       -2.000         .4686E-02     .3588E-02     .1996E-02     .7574E-03      .000        -.2765E-03    -.7219E-04     .2651E-03     .7040E-03
                         .000         .2893E-02     .2071E-02     .9617E-03     .2404E-03      .000         .2404E-03     .9617E-03     .1598E-02     .2304E-02
                        2.000         .1100E-02     .5536E-03    -.7219E-04    -.2765E-03      .000         .7574E-03     .1996E-02     .2930E-02     .3905E-02
                        4.000        -.6935E-03    -.9635E-03    -.1106E-02    -.7935E-03      .000         .1274E-02     .3030E-02     .4263E-02     .5505E-02
                        6.000        -.2487E-02    -.2481E-02    -.2140E-02    -.1310E-02      .000         .1791E-02     .4063E-02     .5596E-02     .7106E-02
                        8.000        -.4280E-02    -.3998E-02    -.3174E-02    -.1827E-02      .000         .2308E-02     .5097E-02     .6928E-02     .8706E-02
                        9.000        -.5176E-02    -.4756E-02    -.3691E-02    -.2086E-02      .000         .2567E-02     .5614E-02     .7595E-02     .9507E-02
                        10.00        -.6073E-02    -.5515E-02    -.4208E-02    -.2344E-02      .000         .2825E-02     .6131E-02     .8261E-02     .1031E-01
                        12.00        -.7866E-02    -.7032E-02    -.5242E-02    -.2861E-02      .000         .3342E-02     .7165E-02     .9594E-02     .1191E-01
                        14.00        -.9659E-02    -.8549E-02    -.6276E-02    -.3378E-02      .000         .3859E-02     .8199E-02     .1093E-01     .1351E-01
                        16.00        -.1145E-01    -.1007E-01    -.7310E-02    -.3895E-02      .000         .4376E-02     .9233E-02     .1226E-01     .1511E-01
                        18.00        -.1325E-01    -.1158E-01    -.8344E-02    -.4412E-02      .000         .4893E-02     .1027E-01     .1359E-01     .1671E-01
                        19.00        -.1414E-01    -.1234E-01    -.8861E-02    -.4671E-02      .000         .5152E-02     .1078E-01     .1426E-01     .1751E-01
                        20.00        -.1504E-01    -.1310E-01    -.9377E-02    -.4929E-02      .000         .5410E-02     .1130E-01     .1492E-01     .1831E-01
                        21.00        -.1594E-01    -.1386E-01    -.9894E-02    -.5188E-02      .000         .5669E-02     .1182E-01     .1559E-01     .1911E-01
                        22.00        -.1683E-01    -.1462E-01    -.1041E-01    -.5446E-02      .000         .5927E-02     .1233E-01     .1626E-01     .1991E-01
                  </tableData>
               </table>
            </product>
         </function>

         <function name="aero/coefficient/CdDf12L">
            <description>
               Drag Coefficient due to Left Plain Flaps Deflection
               Positive surface deflection is trailing edge down
               Ultimately, we will feed this left flap pos
            </description>
            <product>
               <property>aero/qbar-psf</property>
               <property>metrics/Sw-sqft</property>
               <table>
                  <independentVar lookup="row">aero/alpha-deg</independentVar>
                  <independentVar lookup="column">fcs/flap-pos-deg</independentVar>
                  <tableData>
                                      20.00         15.00         10.00         5.000          .000        -5.000        -10.00        -13.00        -16.00
                       -16.00         .1761E-01     .1452E-01     .9447E-02     .4484E-02      .000        -.4004E-02    -.7529E-02    -.9347E-02    -.1084E-01
                       -8.000         .1025E-01     .8292E-02     .5203E-02     .2362E-02      .000        -.1882E-02    -.3285E-02    -.3877E-02    -.4271E-02
                       -6.000         .8406E-02     .6736E-02     .4142E-02     .1831E-02      .000        -.1352E-02    -.2224E-02    -.2509E-02    -.2629E-02
                       -4.000         .6565E-02     .5179E-02     .3081E-02     .1301E-02      .000        -.8212E-03    -.1163E-02    -.1142E-02    -.9864E-03
                       -2.000         .4725E-02     .3622E-02     .2020E-02     .7703E-03      .000        -.2907E-03    -.1018E-03     .2260E-03     .6559E-03
                         .000         .2885E-02     .2065E-02     .9591E-03     .2398E-03      .000         .2398E-03     .9591E-03     .1594E-02     .2298E-02
                        2.000         .1045E-02     .5083E-03    -.1018E-03    -.2907E-03      .000         .7703E-03     .2020E-02     .2961E-02     .3941E-02
                        4.000        -.7951E-03    -.1048E-02    -.1163E-02    -.8212E-03      .000         .1301E-02     .3081E-02     .4329E-02     .5583E-02
                        6.000        -.2635E-02    -.2605E-02    -.2224E-02    -.1352E-02      .000         .1831E-02     .4142E-02     .5696E-02     .7225E-02
                        8.000        -.4475E-02    -.4162E-02    -.3285E-02    -.1882E-02      .000         .2362E-02     .5203E-02     .7064E-02     .8868E-02
                        9.000        -.5395E-02    -.4941E-02    -.3815E-02    -.2147E-02      .000         .2627E-02     .5734E-02     .7747E-02     .9689E-02
                        10.00        -.6315E-02    -.5719E-02    -.4346E-02    -.2413E-02      .000         .2892E-02     .6264E-02     .8431E-02     .1051E-01
                        12.00        -.8156E-02    -.7276E-02    -.5407E-02    -.2943E-02      .000         .3423E-02     .7325E-02     .9799E-02     .1215E-01
                        14.00        -.9996E-02    -.8833E-02    -.6468E-02    -.3474E-02      .000         .3953E-02     .8386E-02     .1117E-01     .1379E-01
                        16.00        -.1184E-01    -.1039E-01    -.7529E-02    -.4004E-02      .000         .4484E-02     .9447E-02     .1253E-01     .1544E-01
                        18.00        -.1368E-01    -.1195E-01    -.8590E-02    -.4535E-02      .000         .5014E-02     .1051E-01     .1390E-01     .1708E-01
                        19.00        -.1460E-01    -.1272E-01    -.9120E-02    -.4800E-02      .000         .5279E-02     .1104E-01     .1459E-01     .1790E-01
                        20.00        -.1552E-01    -.1350E-01    -.9651E-02    -.5065E-02      .000         .5545E-02     .1157E-01     .1527E-01     .1872E-01
                        21.00        -.1644E-01    -.1428E-01    -.1018E-01    -.5330E-02      .000         .5810E-02     .1210E-01     .1595E-01     .1954E-01
                        22.00        -.1736E-01    -.1506E-01    -.1071E-01    -.5596E-02      .000         .6075E-02     .1263E-01     .1664E-01     .2036E-01
                  </tableData>
               </table>
            </product>
         </function>

         <function name="aero/coefficient/CdDf12R">
            <description>
               Drag Coefficient due to Right Plain Flaps Deflection
               Positive surface deflection is trailing edge down
               Ultimately, we will feed this right flap pos
            </description>
            <product>
               <property>aero/qbar-psf</property>
               <property>metrics/Sw-sqft</property>
               <table>
                  <independentVar lookup="row">aero/alpha-deg</independentVar>
                  <independentVar lookup="column">fcs/flap-pos-deg</independentVar>
                  <tableData>
                                      20.00         15.00         10.00         5.000          .000        -5.000        -10.00        -13.00        -16.00
                       -16.00         .1761E-01     .1452E-01     .9447E-02     .4484E-02      .000        -.4004E-02    -.7529E-02    -.9347E-02    -.1084E-01
                       -8.000         .1025E-01     .8292E-02     .5203E-02     .2362E-02      .000        -.1882E-02    -.3285E-02    -.3877E-02    -.4271E-02
                       -6.000         .8406E-02     .6736E-02     .4142E-02     .1831E-02      .000        -.1352E-02    -.2224E-02    -.2509E-02    -.2629E-02
                       -4.000         .6565E-02     .5179E-02     .3081E-02     .1301E-02      .000        -.8212E-03    -.1163E-02    -.1142E-02    -.9864E-03
                       -2.000         .4725E-02     .3622E-02     .2020E-02     .7703E-03      .000        -.2907E-03    -.1018E-03     .2260E-03     .6559E-03
                         .000         .2885E-02     .2065E-02     .9591E-03     .2398E-03      .000         .2398E-03     .9591E-03     .1594E-02     .2298E-02
                        2.000         .1045E-02     .5083E-03    -.1018E-03    -.2907E-03      .000         .7703E-03     .2020E-02     .2961E-02     .3941E-02
                        4.000        -.7951E-03    -.1048E-02    -.1163E-02    -.8212E-03      .000         .1301E-02     .3081E-02     .4329E-02     .5583E-02
                        6.000        -.2635E-02    -.2605E-02    -.2224E-02    -.1352E-02      .000         .1831E-02     .4142E-02     .5696E-02     .7225E-02
                        8.000        -.4475E-02    -.4162E-02    -.3285E-02    -.1882E-02      .000         .2362E-02     .5203E-02     .7064E-02     .8868E-02
                        9.000        -.5395E-02    -.4941E-02    -.3815E-02    -.2147E-02      .000         .2627E-02     .5734E-02     .7747E-02     .9689E-02
                        10.00        -.6315E-02    -.5719E-02    -.4346E-02    -.2413E-02      .000         .2892E-02     .6264E-02     .8431E-02     .1051E-01
                        12.00        -.8156E-02    -.7276E-02    -.5407E-02    -.2943E-02      .000         .3423E-02     .7325E-02     .9799E-02     .1215E-01
                        14.00        -.9996E-02    -.8833E-02    -.6468E-02    -.3474E-02      .000         .3953E-02     .8386E-02     .1117E-01     .1379E-01
                        16.00        -.1184E-01    -.1039E-01    -.7529E-02    -.4004E-02      .000         .4484E-02     .9447E-02     .1253E-01     .1544E-01
                        18.00        -.1368E-01    -.1195E-01    -.8590E-02    -.4535E-02      .000         .5014E-02     .1051E-01     .1390E-01     .1708E-01
                        19.00        -.1460E-01    -.1272E-01    -.9120E-02    -.4800E-02      .000         .5279E-02     .1104E-01     .1459E-01     .1790E-01
                        20.00        -.1552E-01    -.1350E-01    -.9651E-02    -.5065E-02      .000         .5545E-02     .1157E-01     .1527E-01     .1872E-01
                        21.00        -.1644E-01    -.1428E-01    -.1018E-01    -.5330E-02      .000         .5810E-02     .1210E-01     .1595E-01     .1954E-01
                        22.00        -.1736E-01    -.1506E-01    -.1071E-01    -.5596E-02      .000         .6075E-02     .1263E-01     .1664E-01     .2036E-01
                  </tableData>
               </table>
            </product>
         </function>

         <function name="aero/coefficient/CdDeL">
            <description>
               Drag Coefficient due to Left Stabilator Deflection
               Positive surface deflection is trailing edge down
            </description>
            <product>
               <property>aero/qbar-psf</property>
               <property>metrics/Sw-sqft</property>
               <table>
                  <independentVar lookup="row">aero/alpha-deg</independentVar>
                  <independentVar lookup="column">fcs/left-stabilator-pos-deg</independentVar>
                  <tableData>
                                     -20.00        -15.00        -10.00        -5.000          .000         5.000         10.00         13.00         16.00
                       -16.00         .1761E-01     .1452E-01     .9447E-02     .4484E-02    -.8482E-05    -.4004E-02    -.7529E-02    -.9347E-02    -.1084E-01
                       -8.000         .1025E-01     .8292E-02     .5203E-02     .2362E-02    -.4244E-05    -.1882E-02    -.3285E-02    -.3877E-02    -.4271E-02
                       -6.000         .8406E-02     .6736E-02     .4142E-02     .1831E-02    -.3182E-05    -.1352E-02    -.2224E-02    -.2509E-02    -.2629E-02
                       -4.000         .6565E-02     .5179E-02     .3081E-02     .1301E-02    -.2121E-05    -.8212E-03    -.1163E-02    -.1142E-02    -.9864E-03
                       -2.000         .4725E-02     .3622E-02     .2020E-02     .7703E-03    -.1060E-05    -.2907E-03    -.1018E-03     .2260E-03     .6559E-03
                         .000         .2885E-02     .2065E-02     .9591E-03     .2398E-03     .9591E-09     .2398E-03     .9591E-03     .1594E-02     .2298E-02
                        2.000         .1045E-02     .5083E-03    -.1018E-03    -.2907E-03     .1062E-05     .7703E-03     .2020E-02     .2961E-02     .3941E-02
                        4.000        -.7951E-03    -.1048E-02    -.1163E-02    -.8212E-03     .2123E-05     .1301E-02     .3081E-02     .4329E-02     .5583E-02
                        6.000        -.2635E-02    -.2605E-02    -.2224E-02    -.1352E-02     .3184E-05     .1831E-02     .4142E-02     .5696E-02     .7225E-02
                        8.000        -.4475E-02    -.4162E-02    -.3285E-02    -.1882E-02     .4245E-05     .2362E-02     .5203E-02     .7064E-02     .8868E-02
                        9.000        -.5395E-02    -.4941E-02    -.3815E-02    -.2147E-02     .4778E-05     .2627E-02     .5734E-02     .7747E-02     .9689E-02
                        10.00        -.6315E-02    -.5719E-02    -.4346E-02    -.2413E-02     .5306E-05     .2892E-02     .6264E-02     .8431E-02     .1051E-01
                        12.00        -.8156E-02    -.7276E-02    -.5407E-02    -.2943E-02     .6372E-05     .3423E-02     .7325E-02     .9799E-02     .1215E-01
                        14.00        -.9996E-02    -.8833E-02    -.6468E-02    -.3474E-02     .7433E-05     .3953E-02     .8386E-02     .1117E-01     .1379E-01
                        16.00        -.1184E-01    -.1039E-01    -.7529E-02    -.4004E-02     .8490E-05     .4484E-02     .9447E-02     .1253E-01     .1544E-01
                        18.00        -.1368E-01    -.1195E-01    -.8590E-02    -.4535E-02     .9559E-05     .5014E-02     .1051E-01     .1390E-01     .1708E-01
                        19.00        -.1460E-01    -.1272E-01    -.9120E-02    -.4800E-02     .1008E-04     .5279E-02     .1104E-01     .1459E-01     .1790E-01
                        20.00        -.1552E-01    -.1350E-01    -.9651E-02    -.5065E-02     .1060E-04     .5545E-02     .1157E-01     .1527E-01     .1872E-01
                        21.00        -.1644E-01    -.1428E-01    -.1018E-01    -.5330E-02     .1115E-04     .5810E-02     .1210E-01     .1595E-01     .1954E-01
                        22.00        -.1736E-01    -.1506E-01    -.1071E-01    -.5596E-02     .1168E-04     .6075E-02     .1263E-01     .1664E-01     .2036E-01
                  </tableData>
               </table>
            </product>
         </function>

         <function name="aero/coefficient/CdDeR">
            <description>
               Drag Coefficient due to Right Stabilator Deflection
               Positive surface deflection is trailing edge down
            </description>
            <product>
               <property>aero/qbar-psf</property>
               <property>metrics/Sw-sqft</property>
               <table>
                  <independentVar lookup="row">aero/alpha-deg</independentVar>
                  <independentVar lookup="column">fcs/right-stabilator-pos-deg</independentVar>
                  <tableData>
                                     -20.00        -15.00        -10.00        -5.000          .000         5.000         10.00         13.00         16.00
                       -16.00         .1761E-01     .1452E-01     .9447E-02     .4484E-02    -.8482E-05    -.4004E-02    -.7529E-02    -.9347E-02    -.1084E-01
                       -8.000         .1025E-01     .8292E-02     .5203E-02     .2362E-02    -.4244E-05    -.1882E-02    -.3285E-02    -.3877E-02    -.4271E-02
                       -6.000         .8406E-02     .6736E-02     .4142E-02     .1831E-02    -.3182E-05    -.1352E-02    -.2224E-02    -.2509E-02    -.2629E-02
                       -4.000         .6565E-02     .5179E-02     .3081E-02     .1301E-02    -.2121E-05    -.8212E-03    -.1163E-02    -.1142E-02    -.9864E-03
                       -2.000         .4725E-02     .3622E-02     .2020E-02     .7703E-03    -.1060E-05    -.2907E-03    -.1018E-03     .2260E-03     .6559E-03
                         .000         .2885E-02     .2065E-02     .9591E-03     .2398E-03     .9591E-09     .2398E-03     .9591E-03     .1594E-02     .2298E-02
                        2.000         .1045E-02     .5083E-03    -.1018E-03    -.2907E-03     .1062E-05     .7703E-03     .2020E-02     .2961E-02     .3941E-02
                        4.000        -.7951E-03    -.1048E-02    -.1163E-02    -.8212E-03     .2123E-05     .1301E-02     .3081E-02     .4329E-02     .5583E-02
                        6.000        -.2635E-02    -.2605E-02    -.2224E-02    -.1352E-02     .3184E-05     .1831E-02     .4142E-02     .5696E-02     .7225E-02
                        8.000        -.4475E-02    -.4162E-02    -.3285E-02    -.1882E-02     .4245E-05     .2362E-02     .5203E-02     .7064E-02     .8868E-02
                        9.000        -.5395E-02    -.4941E-02    -.3815E-02    -.2147E-02     .4778E-05     .2627E-02     .5734E-02     .7747E-02     .9689E-02
                        10.00        -.6315E-02    -.5719E-02    -.4346E-02    -.2413E-02     .5306E-05     .2892E-02     .6264E-02     .8431E-02     .1051E-01
                        12.00        -.8156E-02    -.7276E-02    -.5407E-02    -.2943E-02     .6372E-05     .3423E-02     .7325E-02     .9799E-02     .1215E-01
                        14.00        -.9996E-02    -.8833E-02    -.6468E-02    -.3474E-02     .7433E-05     .3953E-02     .8386E-02     .1117E-01     .1379E-01
                        16.00        -.1184E-01    -.1039E-01    -.7529E-02    -.4004E-02     .8490E-05     .4484E-02     .9447E-02     .1253E-01     .1544E-01
                        18.00        -.1368E-01    -.1195E-01    -.8590E-02    -.4535E-02     .9559E-05     .5014E-02     .1051E-01     .1390E-01     .1708E-01
                        19.00        -.1460E-01    -.1272E-01    -.9120E-02    -.4800E-02     .1008E-04     .5279E-02     .1104E-01     .1459E-01     .1790E-01
                        20.00        -.1552E-01    -.1350E-01    -.9651E-02    -.5065E-02     .1060E-04     .5545E-02     .1157E-01     .1527E-01     .1872E-01
                        21.00        -.1644E-01    -.1428E-01    -.1018E-01    -.5330E-02     .1115E-04     .5810E-02     .1210E-01     .1595E-01     .1954E-01
                        22.00        -.1736E-01    -.1506E-01    -.1071E-01    -.5596E-02     .1168E-04     .6075E-02     .1263E-01     .1664E-01     .2036E-01
                  </tableData>
               </table>
            </product>
         </function>

     </axis>


<!-- ********************************************************************** -->


     <axis name="SIDE">


         <function name="aero/coefficient/Cyb">
            <description>
               Side Force coefficient due to Sideslip(per degree)
                Contributes to damping of Dutch Roll mode
            </description>
            <product>
               <property>aero/qbar-psf</property>
               <property>metrics/Sw-sqft</property>
               <property>aero/beta-deg</property>
               <table>
                  <independentVar lookup="row">aero/alpha-deg</independentVar>
                  <tableData>
                       -16.00        -.4383E-02
                       -8.000        -.4383E-02
                       -6.000        -.4383E-02
                       -4.000        -.4383E-02
                       -2.000        -.4383E-02
                         .000        -.4383E-02
                        2.000        -.4383E-02
                        4.000        -.4383E-02
                        6.000        -.4383E-02
                        8.000        -.4383E-02
                        9.000        -.4383E-02
                        10.00        -.4383E-02
                        12.00        -.4383E-02
                        14.00        -.4383E-02
                        16.00        -.4383E-02
                        18.00        -.4383E-02
                        19.00        -.4383E-02
                        20.00        -.4383E-02
                        21.00        -.4383E-02
                        22.00        -.4383E-02
                  </tableData>
               </table>
            </product>
         </function>

         <function name="aero/coefficient/Cyp">
            <description>
               Side Force Coefficient due to Roll Rate(per degree)
            </description>
            <product>
               <property>velocities/p-aero-rad_sec</property>
               <value>57.29577951</value>
               <property>aero/qbar-psf</property>
               <property>metrics/Sw-sqft</property>
               <property>aero/bi2vel</property>
               <table>
                  <independentVar lookup="row">aero/alpha-deg</independentVar>
                  <tableData>
                       -16.00        -.8922E-03
                       -8.000        -.4551E-03
                       -6.000        -.3164E-03
                       -4.000        -.2091E-03
                       -2.000        -.1041E-03
                         .000          .000
                        2.000         .1041E-03
                        4.000         .2091E-03
                        6.000         .3164E-03
                        8.000         .4273E-03
                        9.000         .4897E-03
                        10.00         .5724E-03
                        12.00         .7570E-03
                        14.00         .9359E-03
                        16.00         .1116E-02
                        18.00         .1201E-02
                        19.00         .1133E-02
                        20.00         .1185E-02
                        21.00         .1439E-02
                        22.00         .1616E-02
                  </tableData>
               </table>
            </product>
         </function>


         <!-- *************************
              Not calculated by DATCOM+
              *************************
         -->

         <function name="aero/coefficient/Cyr">
            <description>
               Side Force due to Yaw Rate(DATCOM does not calculate)
               Effect is small
            </description>
            <product>
               <property>velocities/r-aero-rad_sec</property>
               <property>aero/qbar-psf</property>
               <property>metrics/Sw-sqft</property>
               <property>aero/bi2vel</property>
               <value>    .000    </value>
            </product>
         </function>


         <!-- *************************
              Not calculated by DATCOM+
              *************************
         -->

         <function name="aero/coefficient/CyDr">
            <description>
               Side Force due to rudder(DATCOM does not calculate)
            </description>
            <product>
               <property>aero/qbar-psf</property>
               <property>metrics/Sw-sqft</property>
               <property>fcs/rudder-pos-deg</property>
               <value>    .000    </value>
            </product>
         </function>


         <!-- *************************
              Not calculated by DATCOM+
              *************************
         -->

         <function name="aero/coefficient/CyDa">
            <description>
               Side Force due to aileron(DATCOM does not calculate)
               Usually neglected
            </description>
            <product>
               <property>aero/qbar-psf</property>
               <property>metrics/Sw-sqft</property>
               <property>fcs/left-aileron-pos-deg</property>
               <value>    .000    </value>
            </product>
         </function>

     </axis>


<!-- ********************************************************************** -->


     <axis name="ROLL">


         <function name="aero/coefficient/Clb">
            <description>
               Roll Moment coefficient due to Beta(per degree)
               Decrease of Clb to small negative value improves Dutch Roll Damping
               High Positive value leads to excessive spiral instability
            </description>
            <product>
               <property>aero/qbar-psf</property>
               <property>metrics/Sw-sqft</property>
               <property>metrics/bw-ft</property>
               <property>aero/beta-deg</property>
               <table>
                  <independentVar lookup="row">aero/alpha-deg</independentVar>
                  <tableData>
                       -16.00         .6793E-03
                       -8.000         .4043E-03
                       -6.000         .3041E-03
                       -4.000         .2027E-03
                       -2.000         .1010E-03
                         .000         .6678E-11
                        2.000        -.1010E-03
                        4.000        -.2066E-03
                        6.000        -.3306E-03
                        8.000        -.4731E-03
                        9.000        -.5508E-03
                        10.00        -.6311E-03
                        12.00        -.7891E-03
                        14.00        -.9460E-03
                        16.00        -.1099E-02
                        18.00        -.1242E-02
                        19.00        -.1319E-02
                        20.00        -.1412E-02
                        21.00        -.1491E-02
                        22.00        -.1555E-02
                  </tableData>
               </table>
            </product>
         </function>

         <function name="aero/coefficient/Clp">
            <description>
               Roll Moment coefficient due to roll rate(per degree)
               Clp alone determines damping-in-roll characteristics
            </description>
            <product>
               <property>aero/qbar-psf</property>
               <property>metrics/Sw-sqft</property>
               <property>metrics/bw-ft</property>
               <property>aero/bi2vel</property>
               <property>velocities/p-aero-rad_sec</property>
               <table>
                  <independentVar lookup="row">aero/alpha-deg</independentVar>
                  <tableData>
                       -16.00        -.1649E-03
                       -8.000        -.3533E-03
                       -6.000        -.3770E-03
                       -4.000        -.3765E-03
                       -2.000        -.3737E-03
                         .000        -.3716E-03
                        2.000        -.3737E-03
                        4.000        -.3765E-03
                        6.000        -.3770E-03
                        8.000        -.3754E-03
                        9.000        -.3676E-03
                        10.00        -.3394E-03
                        12.00        -.2621E-03
                        14.00        -.1873E-03
                        16.00        -.1013E-03
                        18.00        -.5824E-04
                        19.00        -.1133E-03
                        20.00        -.1025E-03
                        21.00         .3718E-04
                        22.00         .1882E-03
                  </tableData>
               </table>
            </product>
         </function>

         <function name="aero/coefficient/Clr">
            <description>
               Roll Moment coefficient due to yaw rate(per degree)
               Considerable effect on Spiral mode. Large
               positive values leads to strong sprial instability.
            </description>
            <product>
               <property>aero/qbar-psf</property>
               <property>metrics/Sw-sqft</property>
               <property>metrics/bw-ft</property>
               <property>aero/bi2vel</property>
               <property>velocities/r-aero-rad_sec</property>
               <table>
                  <independentVar lookup="row">aero/alpha-deg</independentVar>
                  <tableData>
                       -16.00        -.1923E-02
                       -8.000        -.1159E-02
                       -6.000        -.8707E-03
                       -4.000        -.5796E-03
                       -2.000        -.2885E-03
                         .000          .000
                        2.000         .2885E-03
                        4.000         .5796E-03
                        6.000         .8707E-03
                        8.000         .1159E-02
                        9.000         .1302E-02
                        10.00         .1438E-02
                        12.00         .1659E-02
                        14.00         .1823E-02
                        16.00         .1923E-02
                        18.00         .1950E-02
                        19.00         .1965E-02
                        20.00         .2022E-02
                        21.00         .2028E-02
                        22.00         .1976E-02
                  </tableData>
               </table>
            </product>
         </function>

         <function name="aero/coefficient/ClDs5">
            <description>
               Roll Moment coefficient due to Left Split Flaps Deflection
            </description>
            <product>
               <property>aero/qbar-psf</property>
               <property>metrics/Sw-sqft</property>
               <property>metrics/bw-ft</property>
               <table>
                  <independentVar lookup="row">aero/alpha-deg</independentVar>
                  <independentVar lookup="column">fcs/left-horiz-tail-pos-deg</independentVar>
                  <tableData>
                                     -64.00        -40.00        -20.00        -10.00          .000         10.00         20.00         40.00         64.00
                       -16.00          .000          .000          .000          .000          .000          .000          .000          .000          .000
                       -8.000          .000          .000          .000          .000          .000          .000          .000          .000          .000
                       -6.000          .000          .000          .000          .000          .000          .000          .000          .000          .000
                       -4.000          .000          .000          .000          .000          .000          .000          .000          .000          .000
                       -2.000          .000          .000          .000          .000          .000          .000          .000          .000          .000
                         .000          .000          .000          .000          .000          .000          .000          .000          .000          .000
                        2.000          .000          .000          .000          .000          .000          .000          .000          .000          .000
                        4.000          .000          .000          .000          .000          .000          .000          .000          .000          .000
                        6.000          .000          .000          .000          .000          .000          .000          .000          .000          .000
                        8.000          .000          .000          .000          .000          .000          .000          .000          .000          .000
                        9.000          .000          .000          .000          .000          .000          .000          .000          .000          .000
                        10.00          .000          .000          .000          .000          .000          .000          .000          .000          .000
                        12.00          .000          .000          .000          .000          .000          .000          .000          .000          .000
                        14.00          .000          .000          .000          .000          .000          .000          .000          .000          .000
                        16.00          .000          .000          .000          .000          .000          .000          .000          .000          .000
                        18.00          .000          .000          .000          .000          .000          .000          .000          .000          .000
                        19.00          .000          .000          .000          .000          .000          .000          .000          .000          .000
                        20.00          .000          .000          .000          .000          .000          .000          .000          .000          .000
                        21.00          .000          .000          .000          .000          .000          .000          .000          .000          .000
                        22.00          .000          .000          .000          .000          .000          .000          .000          .000          .000
                  </tableData>
               </table>
            </product>
         </function>

         <function name="aero/coefficient/CldF1">
            <description>
               Roll Moment Coefficient due to Asymetrical Plain Flaps Deflection
               calculated as difference between left and right flap lift coef,
               times distance from centerline to MAC of surface.
            </description>
            <product>
               <value>       .10</value>
               <difference>
                  <property>aero/coefficient/CLdF1R</property>
                  <property>aero/coefficient/CLdF1L</property>
               </difference>
            </product>
         </function>

         <function name="aero/coefficient/CldF11">
            <description>
               Roll Moment Coefficient due to Asymetrical Plain Flaps Deflection
               calculated as difference between left and right flap lift coef,
               times distance from centerline to MAC of surface.
            </description>
            <product>
               <value>       .10</value>
               <difference>
                  <property>aero/coefficient/CLdF11R</property>
                  <property>aero/coefficient/CLdF11L</property>
               </difference>
            </product>
         </function>

         <function name="aero/coefficient/CldF12">
            <description>
               Roll Moment Coefficient due to Asymetrical Plain Flaps Deflection
               calculated as difference between left and right flap lift coef,
               times distance from centerline to MAC of surface.
            </description>
            <product>
               <value>       .10</value>
               <difference>
                  <property>aero/coefficient/CLdF12R</property>
                  <property>aero/coefficient/CLdF12L</property>
               </difference>
            </product>
         </function>


         <!-- *************************
              Not calculated by DATCOM+
              *************************
         -->

         <function name="aero/coefficient/ClDr">
            <description>
               Roll moment due to rudder(DATCOM does not calculate)
               Usually insignificant in dynamic stability considerations
               but is used in autopilot work
            </description>
            <product>
               <property>metrics/bw-ft</property>
               <property>aero/qbar-psf</property>
               <property>metrics/Sw-sqft</property>
               <property>fcs/rudder-pos-deg</property>
               <value>    .000    </value>
            </product>
         </function>

     </axis>


<!-- ********************************************************************** -->


     <axis name="PITCH">


         <function name="aero/coefficient/Cm_basic">
            <description>
               Basic_Pitch_moment_coefficient
            </description>
            <product>
               <property>aero/qbar-psf</property>
               <property>metrics/Sw-sqft</property>
               <property>metrics/cbarw-ft</property>
               <table>
                  <independentVar lookup="row">aero/alpha-deg</independentVar>
                  <tableData>
                       -16.00         .9121
                       -8.000         .5847
                       -6.000         .4391
                       -4.000         .2909
                       -2.000         .1436
                         .000        -.2711E-31
                        2.000        -.1419
                        4.000        -.2826
                        6.000        -.4133
                        8.000        -.5346
                        9.000        -.5892
                        10.00        -.6372
                        12.00        -.6939
                        14.00        -.7108
                        16.00        -.6759
                        18.00        -.5775
                        19.00        -.5268
                        20.00        -.5039
                        21.00        -.4422
                        22.00        -.3350
                  </tableData>
               </table>
            </product>
         </function>

         <function name="aero/coefficient/Cmq">
            <description>
               Pitch moment coefficient due to pitch rate(per degree)
                Pitch Damping Derivative
               Very important to Short Period damping of oscillations
            </description>
            <product>
               <property>aero/qbar-psf</property>
               <property>metrics/Sw-sqft</property>
               <property>metrics/cbarw-ft</property>
               <property>aero/ci2vel</property>
               <property>velocities/q-aero-rad_sec</property>
               <table>
                  <independentVar lookup="row">aero/alpha-deg</independentVar>
                  <tableData>
                       -16.00        -.5980
                       -8.000        -.5980
                       -6.000        -.5980
                       -4.000        -.5980
                       -2.000        -.5980
                         .000        -.5980
                        2.000        -.5980
                        4.000        -.5980
                        6.000        -.5980
                        8.000        -.5980
                        9.000        -.5980
                        10.00        -.5980
                        12.00        -.5980
                        14.00        -.5980
                        16.00        -.5980
                        18.00        -.5980
                        19.00        -.5980
                        20.00        -.5980
                        21.00        -.5980
                        22.00        -.5980
                  </tableData>
               </table>
            </product>
         </function>

         <function name="aero/coefficient/Cmadot">
            <description>
               Pitch moment coefficient due to AOA rate(per degree)
               Negitive Cmad increase Short Period damping
            </description>
            <product>
               <property>aero/qbar-psf</property>
               <property>metrics/Sw-sqft</property>
               <property>metrics/cbarw-ft</property>
               <property>aero/ci2vel</property>
               <property>aero/alphadot-deg_sec</property>
               <table>
                  <independentVar lookup="row">aero/alpha-deg</independentVar>
                  <tableData>
                       -16.00          .000
                       -8.000          .000
                       -6.000          .000
                       -4.000          .000
                       -2.000          .000
                         .000          .000
                        2.000          .000
                        4.000          .000
                        6.000          .000
                        8.000          .000
                        9.000          .000
                        10.00          .000
                        12.00          .000
                        14.00          .000
                        16.00          .000
                        18.00          .000
                        19.00          .000
                        20.00          .000
                        21.00          .000
                        22.00          .000
                  </tableData>
               </table>
            </product>
         </function>

         <function name="aero/coefficient/CmDe">
            <description>
               Pitch moment coefficient due to elevator deflection
               Positive surface deflection is trailing edge down
            </description>
            <product>
               <property>aero/qbar-psf</property>
               <property>metrics/Sw-sqft</property>
               <property>metrics/cbarw-ft</property>
               <table>
                  <independentVar lookup="row">fcs/elevator-pos-deg</independentVar>
                  <tableData>
                       -20.00         .6056
                       -15.00         .5114
                       -10.00         .3497
                       -5.000         .1751
                         .000        -.3502E-03
                        5.000        -.1751
                        10.00        -.3497
                        13.00        -.4494
                        16.00        -.5398
                  </tableData>
               </table>
            </product>
         </function>

         <function name="aero/coefficient/CmDf1L">
            <description>
               Pitch moment coefficient due to left Plain Flaps Deflection
               Positive surface deflection is trailing edge down
               Ultimately, we will feed this left flap pos
            </description>
            <product>
               <property>aero/qbar-psf</property>
               <property>metrics/Sw-sqft</property>
               <property>metrics/cbarw-ft</property>
               <table>
                  <independentVar lookup="row">fcs/flap-pos-deg</independentVar>
                  <tableData>
                       -20.00         .3131
                       -15.00         .2635
                       -10.00         .1802
                       -5.000         .9020E-01
                         .000          .000
                        5.000        -.9020E-01
                        10.00        -.1802
                        13.00        -.2316
                        16.00        -.2781
                  </tableData>
               </table>
            </product>
         </function>

         <function name="aero/coefficient/CmDf1R">
            <description>
               Pitch moment coefficient due to right Plain Flaps Deflection
               Positive surface deflection is trailing edge down
               Ultimately, we will feed this right flap pos
            </description>
            <product>
               <property>aero/qbar-psf</property>
               <property>metrics/Sw-sqft</property>
               <property>metrics/cbarw-ft</property>
               <table>
                  <independentVar lookup="row">fcs/flap-pos-deg</independentVar>
                  <tableData>
                       -20.00         .3131
                       -15.00         .2635
                       -10.00         .1802
                       -5.000         .9020E-01
                         .000          .000
                        5.000        -.9020E-01
                        10.00        -.1802
                        13.00        -.2316
                        16.00        -.2781
                  </tableData>
               </table>
            </product>
         </function>

         <function name="aero/coefficient/CmDf11L">
            <description>
               Pitch moment coefficient due to left Plain Flaps Deflection
               Positive surface deflection is trailing edge down
               Ultimately, we will feed this left flap pos
            </description>
            <product>
               <property>aero/qbar-psf</property>
               <property>metrics/Sw-sqft</property>
               <property>metrics/cbarw-ft</property>
               <table>
                  <independentVar lookup="row">fcs/flap-pos-deg</independentVar>
                  <tableData>
                        20.00         .3145
                        15.00         .2656
                        10.00         .1816
                        5.000         .9088E-01
                         .000          .000
                       -5.000        -.9088E-01
                       -10.00        -.1816
                       -13.00        -.2334
                       -16.00        -.2803
                  </tableData>
               </table>
            </product>
         </function>

         <function name="aero/coefficient/CmDf11R">
            <description>
               Pitch moment coefficient due to right Plain Flaps Deflection
               Positive surface deflection is trailing edge down
               Ultimately, we will feed this right flap pos
            </description>
            <product>
               <property>aero/qbar-psf</property>
               <property>metrics/Sw-sqft</property>
               <property>metrics/cbarw-ft</property>
               <table>
                  <independentVar lookup="row">fcs/flap-pos-deg</independentVar>
                  <tableData>
                        20.00         .3145
                        15.00         .2656
                        10.00         .1816
                        5.000         .9088E-01
                         .000          .000
                       -5.000        -.9088E-01
                       -10.00        -.1816
                       -13.00        -.2334
                       -16.00        -.2803
                  </tableData>
               </table>
            </product>
         </function>

         <function name="aero/coefficient/CmDf12L">
            <description>
               Pitch moment coefficient due to left Plain Flaps Deflection
               Positive surface deflection is trailing edge down
               Ultimately, we will feed this left flap pos
            </description>
            <product>
               <property>aero/qbar-psf</property>
               <property>metrics/Sw-sqft</property>
               <property>metrics/cbarw-ft</property>
               <table>
                  <independentVar lookup="row">fcs/flap-pos-deg</independentVar>
                  <tableData>
                        20.00         .3028
                        15.00         .2557
                        10.00         .1749
                        5.000         .8754E-01
                         .000          .000
                       -5.000        -.8754E-01
                       -10.00        -.1749
                       -13.00        -.2247
                       -16.00        -.2699
                  </tableData>
               </table>
            </product>
         </function>

         <function name="aero/coefficient/CmDf12R">
            <description>
               Pitch moment coefficient due to right Plain Flaps Deflection
               Positive surface deflection is trailing edge down
               Ultimately, we will feed this right flap pos
            </description>
            <product>
               <property>aero/qbar-psf</property>
               <property>metrics/Sw-sqft</property>
               <property>metrics/cbarw-ft</property>
               <table>
                  <independentVar lookup="row">fcs/flap-pos-deg</independentVar>
                  <tableData>
                        20.00         .3028
                        15.00         .2557
                        10.00         .1749
                        5.000         .8754E-01
                         .000          .000
                       -5.000        -.8754E-01
                       -10.00        -.1749
                       -13.00        -.2247
                       -16.00        -.2699
                  </tableData>
               </table>
            </product>
         </function>

     </axis>


<!-- ********************************************************************** -->


     <axis name="YAW">


         <function name="aero/coefficient/Cnb">
            <description>
               Yaw moment coefficient due to sideslip(per degree)
               Determines Dutch Roll and Spiral characteristics
               Prevents side-slip and yawing moments
            </description>
            <product>
               <property>aero/qbar-psf</property>
               <property>metrics/Sw-sqft</property>
               <property>metrics/bw-ft</property>
               <property>aero/beta-deg</property>
               <table>
                  <independentVar lookup="row">aero/alpha-deg</independentVar>
                  <tableData>
                       -16.00          .000
                       -8.000          .000
                       -6.000          .000
                       -4.000          .000
                       -2.000          .000
                         .000          .000
                        2.000          .000
                        4.000          .000
                        6.000          .000
                        8.000          .000
                        9.000          .000
                        10.00          .000
                        12.00          .000
                        14.00          .000
                        16.00          .000
                        18.00          .000
                        19.00          .000
                        20.00          .000
                        21.00          .000
                        22.00          .000
                  </tableData>
               </table>
            </product>
         </function>

         <function name="aero/coefficient/Cnp">
            <description>
               Yaw moment coefficient due to roll rate(per degree)
               Reduces Dutch Roll damping
               positive value desireable
            </description>
            <product>
               <property>aero/qbar-psf</property>
               <property>metrics/Sw-sqft</property>
               <property>metrics/bw-ft</property>
               <property>aero/bi2vel</property>
               <property>velocities/p-aero-rad_sec</property>
               <table>
                  <independentVar lookup="row">aero/alpha-deg</independentVar>
                  <tableData>
                       -16.00         .2764E-03
                       -8.000         .1282E-03
                       -6.000         .8538E-04
                       -4.000         .5624E-04
                       -2.000         .2801E-04
                         .000          .000
                        2.000        -.2801E-04
                        4.000        -.5624E-04
                        6.000        -.8538E-04
                        8.000        -.1160E-03
                        9.000        -.1346E-03
                        10.00        -.1628E-03
                        12.00        -.2294E-03
                        14.00        -.2943E-03
                        16.00        -.3594E-03
                        18.00        -.3893E-03
                        19.00        -.3637E-03
                        20.00        -.3814E-03
                        21.00        -.4660E-03
                        22.00        -.5052E-03
                  </tableData>
               </table>
            </product>
         </function>

         <function name="aero/coefficient/Cnr">
            <description>
               Yaw Moment coefficient due to yaw rate(per degree)
               Main contributor to damping of Dutch Roll
            </description>
            <product>
               <property>aero/qbar-psf</property>
               <property>metrics/Sw-sqft</property>
               <property>metrics/bw-ft</property>
               <property>aero/bi2vel</property>
               <property>velocities/r-aero-rad_sec</property>
               <table>
                  <independentVar lookup="row">aero/alpha-deg</independentVar>
                  <tableData>
                       -16.00        -.3709E-03
                       -8.000        -.1455E-03
                       -6.000        -.8943E-04
                       -4.000        -.4904E-04
                       -2.000        -.2487E-04
                         .000        -.1690E-04
                        2.000        -.2487E-04
                        4.000        -.4904E-04
                        6.000        -.8943E-04
                        8.000        -.1455E-03
                        9.000        -.1791E-03
                        10.00        -.2148E-03
                        12.00        -.2804E-03
                        14.00        -.3349E-03
                        16.00        -.3709E-03
                        18.00        -.3807E-03
                        19.00        -.3865E-03
                        20.00        -.4081E-03
                        21.00        -.4105E-03
                        22.00        -.3904E-03
                  </tableData>
               </table>
            </product>
         </function>

         <function name="aero/coefficient/CnDf1">
            <description>
               Yaw Moment Coefficient due to Asymetrical Plain Flaps Deflection
               calculated as difference between left and right flap drag coef,
               times distance from centerline to MAC of surface.
            </description>
            <product>
               <value>       .10</value>
               <difference>
                  <property>aero/coefficient/CdDf1R</property>
                  <property>aero/coefficient/CdDf1L</property>
               </difference>
            </product>
         </function>

         <function name="aero/coefficient/CnDf11">
            <description>
               Yaw Moment Coefficient due to Asymetrical Plain Flaps Deflection
               calculated as difference between left and right flap drag coef,
               times distance from centerline to MAC of surface.
            </description>
            <product>
               <value>       .10</value>
               <difference>
                  <property>aero/coefficient/CdDf11R</property>
                  <property>aero/coefficient/CdDf11L</property>
               </difference>
            </product>
         </function>

         <function name="aero/coefficient/CnDf12">
            <description>
               Yaw Moment Coefficient due to Asymetrical Plain Flaps Deflection
               calculated as difference between left and right flap drag coef,
               times distance from centerline to MAC of surface.
            </description>
            <product>
               <value>       .10</value>
               <difference>
                  <property>aero/coefficient/CdDf12R</property>
                  <property>aero/coefficient/CdDf12L</property>
               </difference>
            </product>
         </function>

         <function name="aero/coefficient/CnDdt">
            <description>
               Yaw Moment coefficient due to All Moveable horizontal tail deflection
            </description>
            <product>
               <property>aero/qbar-psf</property>
               <property>metrics/Sw-sqft</property>
               <property>metrics/bw-ft</property>
               <table>
                  <independentVar lookup="row">aero/alpha-deg</independentVar>
                  <tableData>
                                     -64.00        -40.00        -20.00        -10.00          .000         10.00         20.00         40.00         64.00
                       -16.00         .1000E-29     .1000E-29     .1000E-29     .1000E-29     .1000E-29     .1000E-29     .1000E-29     .1000E-29     .1000E-29
                       -8.000         .1000E-29     .1000E-29     .1000E-29     .1000E-29     .1000E-29     .1000E-29     .1000E-29     .1000E-29     .1000E-29
                       -6.000         .1000E-29     .1000E-29     .1000E-29     .1000E-29     .1000E-29     .1000E-29     .1000E-29     .1000E-29     .1000E-29
                       -4.000         .1000E-29     .1000E-29     .1000E-29     .1000E-29     .1000E-29     .1000E-29     .1000E-29     .1000E-29     .1000E-29
                       -2.000         .1000E-29     .1000E-29     .1000E-29     .1000E-29     .1000E-29     .1000E-29     .1000E-29     .1000E-29     .1000E-29
                         .000         .1000E-29     .1000E-29     .1000E-29     .1000E-29     .1000E-29     .1000E-29     .1000E-29     .1000E-29     .1000E-29
                        2.000         .1000E-29     .1000E-29     .1000E-29     .1000E-29     .1000E-29     .1000E-29     .1000E-29     .1000E-29     .1000E-29
                        4.000         .1000E-29     .1000E-29     .1000E-29     .1000E-29     .1000E-29     .1000E-29     .1000E-29     .1000E-29     .1000E-29
                        6.000         .1000E-29     .1000E-29     .1000E-29     .1000E-29     .1000E-29     .1000E-29     .1000E-29     .1000E-29     .1000E-29
                        8.000         .1000E-29     .1000E-29     .1000E-29     .1000E-29     .1000E-29     .1000E-29     .1000E-29     .1000E-29     .1000E-29
                        9.000         .1000E-29     .1000E-29     .1000E-29     .1000E-29     .1000E-29     .1000E-29     .1000E-29     .1000E-29     .1000E-29
                        10.00         .1000E-29     .1000E-29     .1000E-29     .1000E-29     .1000E-29     .1000E-29     .1000E-29     .1000E-29     .1000E-29
                        12.00         .1000E-29     .1000E-29     .1000E-29     .1000E-29     .1000E-29     .1000E-29     .1000E-29     .1000E-29     .1000E-29
                        14.00         .1000E-29     .1000E-29     .1000E-29     .1000E-29     .1000E-29     .1000E-29     .1000E-29     .1000E-29     .1000E-29
                        16.00         .1000E-29     .1000E-29     .1000E-29     .1000E-29     .1000E-29     .1000E-29     .1000E-29     .1000E-29     .1000E-29
                        18.00         .1000E-29     .1000E-29     .1000E-29     .1000E-29     .1000E-29     .1000E-29     .1000E-29     .1000E-29     .1000E-29
                        19.00         .1000E-29     .1000E-29     .1000E-29     .1000E-29     .1000E-29     .1000E-29     .1000E-29     .1000E-29     .1000E-29
                        20.00         .1000E-29     .1000E-29     .1000E-29     .1000E-29     .1000E-29     .1000E-29     .1000E-29     .1000E-29     .1000E-29
                        21.00         .1000E-29     .1000E-29     .1000E-29     .1000E-29     .1000E-29     .1000E-29     .1000E-29     .1000E-29     .1000E-29
                        22.00         .1000E-29     .1000E-29     .1000E-29     .1000E-29     .1000E-29     .1000E-29     .1000E-29     .1000E-29     .1000E-29
                  </tableData>
               </table>
            </product>
         </function>


         <!-- ******************************************************
              CnDr is not calculated by DATCOM+, but a default value
              is supplied
              ******************************************************-->

         <function name="aero/coefficient/CnDr">
            <description>
               Yaw Coefficient due to rudder(DATCOM does not calculate)
               High value for controllablity, low value
               for good dynamic stability
            </description>
            <product>
               <property>aero/qbar-psf</property>
               <property>metrics/Sw-sqft</property>
               <property>metrics/bw-ft</property>
               <property>fcs/rudder-pos-deg</property>
               <value>  -.1047E-02</value>
            </product>
         </function>


     </axis>


<!-- ********************************************************************** -->


      <function name="aero/elev_hinge_moment_ft_lbs">
         <description>
            Elevator hinge moment in ft-lbs
            HM = q * S * Cbar * ( Ch0 + Cha*alpha + Chd*delta )
            Positive causes trailing edge down movement
            Ch0 is used to artifically trim HM to zero
         </description>
         <product>
               <property>aero/qbar-psf</property>
               <property>metrics/Sw-sqft</property>
            <value>   .1360E-01</value>	<!-- surface area of elevator -->
            <value>   .5025E-01</value>	<!-- MAC of elevator -->
            <sum>
 <!--
               <property>aero/Ch0_elev</property>
 -->
               <product>
                  <property>aero/alpha-deg</property>
                  <table>                            	<!-- Ch-alpha -->
                     <independentVar lookup="row">
                     aero/alpha-deg</independentVar>
                     <tableData>
                          -16.00    	   .7694E-03
                          -8.000    	   .7694E-03
                          -6.000    	   .7694E-03
                          -4.000    	   .7694E-03
                          -2.000    	   .7694E-03
                            .000    	   .7694E-03
                           2.000    	   .7694E-03
                           4.000    	   .7694E-03
                           6.000    	   .7694E-03
                           8.000    	   .7694E-03
                           9.000    	   .1021E-01
                           10.00    	   .1023E-01
                           12.00    	   .1024E-01
                           14.00    	   .1024E-01
                           16.00    	   .1024E-01
                           18.00    	   .1024E-01
                           19.00    	   .1024E-01
                           20.00    	   .1024E-01
                           21.00    	   .1023E-01
                           22.00    	   .1024E-01
                     </tableData>
                  </table>
               </product>
               <product>
                  <property>fcs/elevator-pos-deg</property>
                  <table>                            	<!-- Ch-delta elevator -->
                     <independentVar lookup="row">
                     fcs/elevator-pos-deg</independentVar>
                     <tableData>
                          -20.00    	   .1021E-01
                          -15.00    	   .1023E-01
                          -10.00    	   .1024E-01
                          -5.000    	   .1024E-01
                            .000    	   .1024E-01
                           5.000    	   .1024E-01
                           10.00    	   .1024E-01
                           13.00    	   .1024E-01
                           16.00    	   .1023E-01
                     </tableData>
                  </table>
               </product>
            </sum>
         </product>
      </function>

   </aerodynamics>
